// COMSOL Multiphysics 5.2.1.152 model "NMC-Graphit.mph"
// Outline of the model tree
// Components: comp1 "NMC Model", comp2 "LumpedThermalModel"

Parameters
  L_neg = 86.667e-6[m]  // Thickness of graphite electrode
  L_sep = 12e-6[m]  // Thickness of separator
  L_pos = 66.667e-6[m]  // Thickness of positive electrode (NMC)
  T0 = 298[K]  // Temperature
  Ds_neg = 3e-14[m^2/s]  // Solid phase Li-diffusivity graphite
  Ds_pos_NMC = 1e-15[m^2/s]  // Solid phase Li-diffusivity NMC
  rp_neg = 6.0840e-6[m]  // Particle radius graphite
  rp_pos_NMC = 5e-6[m]  // Particle radius NMC
  epss_pos = 1-(epsl_pos+0.106)  // Solid phase vol-fraction positive electrode
  epsl_pos = 0.35  // Electrolyte phase vol-fraction positive electrode
  epss_neg = 1-(epsl_neg+0.064)  // Solid phase vol-fraction negative electrode
  epsl_neg = 0.5379  // Electrolyte phase vol-fraction negative electrode
  epsl_sep = 0.5  // Porosity separator
  cl_0 = 1000[mol/m^3]  // Initial electrolyte salt concentration
  csmax_neg = 28000[mol/m^3]  // Max solid phase concentration negative electrode
  csmax_pos_NMC = 50000[mol/m^3]  // Max solid phase concentration NMC
  cs0_neg = 0.8*csmax_neg  // Initial concentration graphite
  cs0_pos_NMC = 31200 [mol/m^3]  // Initial concentration NMC
  sigma_neg = 100[S/m]  // Solid phase conductivity graphite
  sigma_pos_NMC = 1[S/m]  // Solid phase conductivity NMC
  k_neg = 2e-11[m/s]  // Reaction rate coefficient negative electrode
  k_pos = 2e-11[m/s]  // Reaction rate coefficient positive electrode
  alpha_a = 0.5  // Reaction rate coefficient positive electrode
  alpha_c = 0.5  // Reaction rate coefficient positive electrode
  t_plus = 0.38  // Transport number electrolyte
  i_app = 12.5[A/m^2]  // Applied current
  htc = 1[W/m^2/K]  // Heat transfer Coefficient
  rho = (552[kg/(m^3)]*L_sep+L_neg*1800[kg/(m^3)]+L_pos*5010[kg/(m^3)])/(L_sep+L_neg+L_pos)  // Rough approximation
  Cp = 500[J/(kg*K)]  // Heat Capacity
  RG = 8e-4[V/A*m^2]  // External Contact resistance
  tw = 0.6355 [kg/m^2]
  RGext = RG/4  // External Contact resistance

Functions
  an4: Analytic "Graphite"
    funcname = Eeq_neg
    expr = 1.747+0.4682*x-3.449e-07*exp(13.69*x)+0.05748*tanh(-5.228*x+3.585)-0.01585*tanh(30.28*x-16.35)+0.2144*tanh(9.132*x-9.344)-0.9348*tanh(25.18*x-1.854)+0.2918*tanh(4.401*x-0.6359)-0.9978*tanh(43.32*x-0.08442)+0.9335*tanh(24.08*x-1.783)-tanh(0.0706*x)-tanh(3.34*x)
    args = x
    argunit = 1
    fununit = V
  int2: Interpolation "NMC"
    funcname = Eeq_pos_NMC
    table = 
      {0, 6.0826}
      {0.01, 6.013386025}
      {0.02, 5.945577722}
      {0.03, 5.879159523}
      {0.04, 5.814115859}
      {0.05, 5.750431163}
      {0.06, 5.688089865}
      {0.07, 5.627076398}
      {0.08, 5.567375194}
      {0.09, 5.508970684}
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    interp = piecewisecubic
    argunit = 1
    fununit = V
  an1: Analytic "Electrolyte_Dl" | funcname = Dl; expr = 10^(-4.43-54/(T-(229-5*cl))-0.22*cl)*10^-4; args = {cl, T}; argunit = mol/l, K; fununit = m^2/s
  an2: Analytic "Electrolyte_dlnf" | funcname = dlnf; expr = (0.601-0.24*cl^0.5+0.982*(1-0.0052*(T-298.15))*cl^1.5)/(1-t_plus)-1; args = {cl, T}; argunit = mol/l, K; fununit = 1
  an3: Analytic "Electrolyte_kappa" | funcname = kappa; expr = cl*(-10.5+0.074*T-6.96e-5*T^2+0.668*cl-0.0178*cl*T+2.8e-5*cl*T^2+0.494*cl^2-8.86e-4*cl^2*T)^2*0.1; args = {cl, T}; argunit = mol/l, K; fununit = S/m
  int3: Interpolation "Entropy_Graphite"
    funcname = dEeqdT_neg
    table = 
      {0.0000000e+00, 5.2700000e-03}
      {1.0000000e-02, 4.9161311e-02}
      {2.0000000e-02, 1.1269475e-01}
      {3.0000000e-02, 1.9070171e-01}
      {4.0000000e-02, 2.4996395e-01}
      {5.0000000e-02, 2.4670045e-01}
      {6.0000000e-02, 1.9017663e-01}
      {7.0000000e-02, 1.2383313e-01}
      {8.0000000e-02, 7.0147138e-02}
      {9.0000000e-02, 3.1338363e-02}
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    argunit = 1
    fununit = mV/K
  int4: Interpolation "Entropy_NMC"
    funcname = dEeqdT_pos
    table = 
      {0.905, -0.129}
      {, }
      {0.869, -0.124}
      {, }
      {0.838, -0.110}
      {, }
      {0.810, -0.098}
      {, }
      {0.787, -0.089}
      {, }
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    interp = piecewisecubic
    argunit = 1
    fununit = mV/K

Variables
  var2 "Variables 2" [comp2]
    Q = abs(-i_app*V-(comp1.intop2(comp1.Q2)+comp1.intop1(comp1.Q1))-RGext*i_app^2)
  var3 "Variables 3" [comp1] on domains 1-3
    v = EndTerminal(phis)-RGext*i_app
    T = T0
    Q1 = liion.iv_per1*(Eeq_pos_NMC(soc_bulk_pos)-comp2.T*dEeqdT_pos(soc_bulk_pos))
    soc_bulk_neg = cs0_neg/csmax_neg - i_app/epss_neg/F_const/L_neg/csmax_neg*t
    soc_bulk_pos = cs0_pos_NMC/csmax_pos_NMC + i_app/epss_pos/F_const/L_pos/csmax_pos_NMC*t
    Q2 = liion.iv_per1*(Eeq_neg(soc_bulk_neg)-comp2.T*dEeqdT_neg(soc_bulk_neg))
  var4 "Variables 4"
    V = comp1.EndTerminal(comp1.phis)

Couplings
  intop1: Integration on boundaries 4 | opname = EndTerminal
  intop2: Integration "Integration 2a" on domains 1 | opname = intop1
  intop3: Integration on domains 3 | opname = intop2

Geometry
  geom1 "Geometry 1" [comp1] (1D, length unit m)
    i1: Interval | intervals = many; p = 0, L_neg, L_neg+L_sep, L_neg+L_sep+L_pos
    fin: Finalize "Form Union"

Physics
  liion: LithiumIonBatteryMPH "Lithium-Ion Battery" [geom1] on all domains
    dependent variable phil
    ice1: Electrolyte (default)
    nf1: NoFlux (default)
    ins1: Insulation (default)
    init1: init "Initial Values sep" (default) | phil = -Eeq_neg(cs0_neg/csmax_neg); cl = cl_0
    sep1: Separator on domains 2
      sigmal_mat = userdef
      sigmal = kappa(cl,T)
      Dl_mat = userdef
      Dl = Dl(cl,T)
      transpNum_mat = userdef
      transpNum = t_plus
      fcl_mat = userdef
      fcl = dlnf(cl,T)
      epsl = epsl_sep
      IonicCorrModel = Bruggeman
      DiffusionCorrModel = Bruggeman
      minput_temperature = T
    pce1: PorousElectrode "Porous Electrode neg" on domains 1
      sigmal_mat = userdef
      sigmal = kappa(cl,T)
      Dl_mat = userdef
      Dl = Dl(cl,T)
      transpNum_mat = userdef
      transpNum = t_plus
      fcl_mat = userdef
      fcl = dlnf(cl,T)
      sigma_mat = userdef
      sigma = sigma_neg
      csinit = cs0_neg
      rp = rp_neg
      Ds_mat = userdef
      Ds = Ds_neg
      cEeqref_mat = userdef
      cEeqref = csmax_neg
      socmax_mat = userdef
      socmax = 1
      socmin_mat = userdef
      socmin = 0
      epsl = epsl_neg
      epss = epss_neg
      IonicCorrModel = Bruggeman
      ElectricCorrModel = Bruggeman
      DiffusionCorrModel = Bruggeman
      Nel = 20
      minput_temperature = T
      per1: PorousElectrodeReaction (default)
        Eeq = Eeq_neg(liion.cs_surface/csmax_neg)
        dEeqdT = dEeqdT_neg(liion.cs_surface/csmax_neg)
        alphaa = alpha_a
        alphac = alpha_c
        k_a = k_neg
        k_c = k_neg
        minput_temperature = T
    init2: init "Initial Values neg" on domains 1 | phil = -Eeq_neg(cs0_neg/csmax_neg); cl = cl_0
    pce2: PorousElectrode "Porous Electrode pos NMC" on domains 3
      sigmal_mat = userdef
      sigmal = kappa(cl,T)
      Dl_mat = userdef
      Dl = Dl(cl,T)
      transpNum_mat = userdef
      transpNum = t_plus
      fcl_mat = userdef
      fcl = dlnf(cl,T)
      sigma_mat = userdef
      sigma = sigma_pos_NMC
      csinit = cs0_pos_NMC
      rp = rp_pos_NMC
      Ds_mat = userdef
      Ds = Ds_pos_NMC
      cEeqref_mat = userdef
      cEeqref = csmax_pos_NMC
      socmax_mat = userdef
      socmax = 1
      socmin_mat = userdef
      socmin = 0
      epsl = epsl_pos
      epss = epss_pos
      IonicCorrModel = Bruggeman
      ElectricCorrModel = Bruggeman
      DiffusionCorrModel = Bruggeman
      Nel = 20
      minput_temperature = T
      per1: PorousElectrodeReaction (default)
        Eeq = Eeq_pos_NMC(liion.cs_surface/csmax_pos_NMC)
        dEeqdT = dEeqdT_pos(liion.cs_surface/csmax_pos_NMC)
        alphaa = alpha_a
        alphac = alpha_c
        k_a = k_pos
        k_c = k_pos
        minput_temperature = T
    init3: init "Initial Values pos NMC" on domains 3
      phil = -Eeq_neg(cs0_neg/csmax_neg)
      cl = cl_0
      phis = Eeq_pos_NMC(cs0_pos_NMC/csmax_pos_NMC)-Eeq_neg(cs0_neg/csmax_neg)
    egnd1: ElectricGround "Electric Ground neg" on boundaries 1
    ecd1: ElectrodeNormalCurrentDensity "Electrode Current Density pos" on boundaries 4 | nis = -i_app
  ge: GlobalEquations "Global ODEs and DAEs" [comp2]
    ge1: GlobalEquations
      name = T
      equation = Cp*tw*Tt+htc*(T-T0)-Q
      initialValueU = T0
      valueType = complex
      DependentVariableQuantity = temperature
      CustomDependentVariableUnit = m
      SourceTermQuantity = powerflow
      CustomSourceTermUnit = m

Mesh
  mesh1 "Mesh 1" [geom1] (physics-controlled)
    size: MeshSizeDefault | hauto = 5

Studies
  std1 "Study 1"
    time: Transient "Time Dependent" | tlist = range(0,5,3600)

Solver configurations
  sol1 "Solution 1" (study std1)
    v1: Variables "Dependent Variables 1"
      comp1_cl: Field "Electrolyte salt concentration (comp1.cl)" | scalemethod = manual; scaleval = 1000
      comp1_liion_pce1_cs: Field "Solid phase concentration (comp1.liion.pce1.cs)"
        scalemethod = manual
        scaleval = 10000
      comp1_liion_pce2_cs: Field "Solid phase concentration (comp1.liion.pce2.cs)"
        scalemethod = manual
        scaleval = 10000
      comp1_phil: Field "Electrolyte potential (comp1.phil)" | scalemethod = manual; scaleval = 1
      comp1_phis: Field "Electric potential (comp1.phis)" | scalemethod = manual; scaleval = 1
    t1: Time "Time-Dependent Solver 1"
      tlist = range(0,5,3600)
      rtol = 0.001
      atolglobalmethod = scaled
      atolglobal = 0.001
      maxorder = 2
      fc1: FullyCoupled | linsolver = d1; dtech = auto; initstep = 1; minstep = 1.0E-4; maxiter = 5
      d1: Direct
      prob1: SolverProblem "Information 1"
        error1: SolverError "Error 1"

Datasets
  dset1: Solution | solution = sol1

Derived values
  gev1: EvalGlobal "Global Evaluation 1" | data = dset1; expr = comp2.T
  pev1: EvalPoint "Point Evaluation 1" on boundaries 4 | data = dset1; table = tbl1; expr = v

Tables
  tbl1: Table
    // Point Evaluation 1 (v)
    Time (s) | v (V), Point: 4
    0 | 3.68469
    5 | 3.67335
    10 | 3.66822
    15 | 3.66447
    20 | 3.66126
    25 | 3.65857
    30 | 3.65613
    35 | 3.65392
    40 | 3.65201
    45 | 3.65009
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
Plots
  pg1: PlotGroup1D "Electrolyte Salt Concentration (liion)" | data = dset1
    lngr1: LineGraph on all domains | expr = cl; xdata = expr; xdataexpr = x
  pg3: PlotGroup1D "1D Plot Group 3" | data = dset1
    ptgr1: PointGraph on boundaries 4 | expr = v
  pg4: PlotGroup1D "1D Plot Group 4" | data = dset1
    glob1: Global | expr = comp2.Q; unit = W/m^2
  pg5: PlotGroup1D "1D Plot Group 5" | data = dset1
    glob1: Global | expr = comp2.Q; unit = W/m^2